// SBML level 3 version 2
// Created with https://github.com/matthiaskoenig/sbmlutils.

model tirzepatide_intestine(Vext, Vgu, Vlumen, Vfeces, Vstomach, tm_lumen, tm_feces)
  // Model for tirzepatide metabolite excretion
  // Model for tirzepatide excretion
  // Terms of use
  // The content of this model has been carefully created in a manual research effort. This file has been created by Matthias König using sbmlutils. For questions contact koenigmx@hu-berlin.de. Copyright © 2025 Matthias König.
  // This work is licensed under a Creative Commons Attribution 4.0 International License.
  // Redistribution and use of any part of this model, with or without modification, are permitted provided that the following conditions are met:
  // Redistributions of this SBML file must retain the above copyright notice, this list of conditions and the following disclaimer.
  // Redistributions in a different form must reproduce the above copyright notice, this list of conditions and the following disclaimer in the documentation and/or other materials provided with the distribution.
  // This model is distributed in the hope that it will be useful, but WITHOUT ANY WARRANTY; without even the implied warranty of MERCHANTABILITY or FITNESS FOR A PARTICULAR PURPOSE.
  // model units - substance: mmole, time: min, volume: litre, area: m2, length: metre, extent: mmole

  // Compartments:
  compartment Vext = 1 litre; Vext is "plasma";  // SBO:0000290 ncit:C13356 BTO:0000131
  compartment Vgu = 1.2825 litre; Vgu is "intestine";  // SBO:0000290 FMA:45615 BTO:0000545 ncit:C12736
  compartment Vlumen = 1.15425 litre; Vlumen is "intestinal lumen (inner part of intestine)";  // SBO:0000290 FMA:14586 UBERON:0018543
  compartment Vfeces = 1 litre;  // SBO:0000290 FMA:64183 ncit:C13234 BTO:0000440
  compartment Ventero = 0.12825 litre; Ventero is "intestinal lining (enterocytes)";  // SBO:0000290
  compartment Vapical = NaN; Vapical has m2; Vapical is "apical membrane (intestinal membrane enterocytes)";  // 2-D; SBO:0000290 FMA:84666 GO:0016324
  compartment Vbaso = NaN; Vbaso has m2; Vbaso is "basolateral membrane (intestinal membrane enterocytes)";  // 2-D; SBO:0000290 FMA:84669 GO:0016323
  compartment Vstomach = 1 litre;  // SBO:0000290 FMA:7148 ncit:C12391 UBERON:0000945
  compartment Vint_0; Vint_0 has litre; Vint_0 is "intestinal lumen (inner part of intestine)";  // SBO:0000290 FMA:14586 UBERON:0018543
  compartment Vint_1; Vint_1 has litre; Vint_1 is "intestinal lumen (inner part of intestine)";  // SBO:0000290 FMA:14586 UBERON:0018543
  compartment Vint_2; Vint_2 has litre; Vint_2 is "intestinal lumen (inner part of intestine)";  // SBO:0000290 FMA:14586 UBERON:0018543
  compartment Vint_3; Vint_3 has litre; Vint_3 is "intestinal lumen (inner part of intestine)";  // SBO:0000290 FMA:14586 UBERON:0018543
  compartment Vint_4; Vint_4 has litre; Vint_4 is "intestinal lumen (inner part of intestine)";  // SBO:0000290 FMA:14586 UBERON:0018543

  // Species:
  species tm_lumen in Vlumen = 0; tm_lumen is "tirzepatide metabolite (intestinal volume)";  // SBO:0000247
  substanceOnly species tm_feces in Vfeces = 0; tm_feces is "tirzepatide (feces)";  // SBO:0000247
  species tm_int_0 in Vint_0 = 0; tm_int_0 is "tirzepatide (intestine) 0";  // SBO:0000247
  species tm_int_1 in Vint_1 = 0; tm_int_1 is "tirzepatide (intestine) 1";  // SBO:0000247
  species tm_int_2 in Vint_2 = 0; tm_int_2 is "tirzepatide (intestine) 2";  // SBO:0000247
  species tm_int_3 in Vint_3 = 0; tm_int_3 is "tirzepatide (intestine) 3";  // SBO:0000247
  species tm_int_4 in Vint_4 = 0; tm_int_4 is "tirzepatide (intestine) 4";  // SBO:0000247

  // Parameters:
  Vchain = 0.1 litre; Vchain is "volume of chain compartment";  // SBO:0000009
  TMEXC_k = 0.0003920629 per_min; TMEXC_k is "rate of tirzepatide metabolite fecal excretion";  // SBO:0000009

  // Assignment rules:
  Vint_0 := Vchain;
  Vint_1 := Vchain;
  Vint_2 := Vchain;
  Vint_3 := Vchain;
  Vint_4 := Vchain;

  // Reactions:
  tmEXC: tm_lumen => tm_int_0; TMEXC_k*Vgu*tm_lumen; tmEXC is "excretion tirzepatide metabolite (feces)";  // SBO:0000655
  tmEXC_0: tm_int_0 => tm_int_1; TMEXC_k*Vint_0*tm_int_0; tmEXC_0 is "excretion tirzepatide metabolite 0";  // SBO:0000655
  tmEXC_1: tm_int_1 => tm_int_2; TMEXC_k*Vint_1*tm_int_1; tmEXC_1 is "excretion tirzepatide metabolite 1";  // SBO:0000655
  tmEXC_2: tm_int_2 => tm_int_3; TMEXC_k*Vint_2*tm_int_2; tmEXC_2 is "excretion tirzepatide metabolite 2";  // SBO:0000655
  tmEXC_3: tm_int_3 => tm_int_4; TMEXC_k*Vint_3*tm_int_3; tmEXC_3 is "excretion tirzepatide metabolite 3";  // SBO:0000655
  tmEXC_4: tm_int_4 => tm_feces; TMEXC_k*Vint_4*tm_int_4; tmEXC_4 is "excretion tirzepatide metabolite 4";  // SBO:0000655

  // Unit definitions:
  unit g_per_mole = gram / mole; g_per_mole is "g/mole";
  unit l_per_min = litre / (60 second); l_per_min is "l/min";
  unit m2 = metre^2; m2 is "meter^2";
  unit mM = 1e-3 mole / litre; mM is "mmole/liter";
  unit mg = 1e-3 gram;
  unit mg_per_min = 1e-3 gram / (60 second); mg_per_min is "mg/min";
  unit mg_per_s_l = 1e-3 gram / (second * litre); mg_per_s_l is "mg/s/l";
  unit min = 60 second;
  unit min_per_hr = 60 second / (3600 second); min_per_hr is "min/hour";
  unit mmole = 1e-3 mole;
  unit mmole_per_min = 1e-3 mole / (60 second); mmole_per_min is "mmole/min";
  unit mmole_per_min_l = 1e-3 mole / (60 second * litre); mmole_per_min_l is "mmole/min/l";
  unit per_hr = 1 / (3600 second); per_hr is "1/hr";
  unit per_min = 1 / (60 second); per_min is "1/min";
  unit per_mmole = 1 / (1e-3 mole); per_mmole is "1/mmole";
end
